AeroCats_2014
0.0			| Mach
0 0 0.0		| iYsym  iZsym  Zsym
2100.0 20.374091743 106.0		| Sref   Cref   Bref
11.5472440945 0.0 5.00349065673		| Xref   Yref   Zref
0.0			| CDp  (optional)
#==============================================================
#
SURFACE
Horizontal Tail
10  1.0  20  -2.0  |  Nchord   Cspace   Nspan  Sspace

YDUPLICATE
0.0

ANGLE
0.746966103195

INDEX
2
#-----------------------
SECTION
43.304201651 0.0 17.0034906567   7.69230769231  0 0 0 | Xle Yle Zle   Chord   Ainc   [ Nspan Sspace ]
AFIL
"C:\eclipse\workspace\AircraftDesign\trunk\Airfoils\E169\E169_inv.dat"
#-----------------------
SECTION
43.304201651 9.1 17.0034906567   7.69230769231  0 0 0 | Xle Yle Zle   Chord   Ainc   [ Nspan Sspace ]
AFIL
"C:\eclipse\workspace\AircraftDesign\trunk\Airfoils\E169\E169_inv.dat"
CONTROL
Elevator  1.0  0.5  0. 0. 0.  1.0 | Name  gain  Xhinge  XYZhvec  SgnDup
#-----------------------
SECTION
43.304201651 32.5 17.0034906567   7.69230769231  0 0 0 | Xle Yle Zle   Chord   Ainc   [ Nspan Sspace ]
AFIL
"C:\eclipse\workspace\AircraftDesign\trunk\Airfoils\E169\E169_inv.dat"
CONTROL
Elevator  1.0  0.5  0. 0. 0.  1.0 | Name  gain  Xhinge  XYZhvec  SgnDup
#==============================================================
#
SURFACE
ACMainWing
10  1.0  20  -2.0  |  Nchord   Cspace   Nspan  Sspace

YDUPLICATE
0.0

ANGLE
0.0

INDEX
1
#-----------------------
SECTION
2.03257662072 0.0 8.00349065673   22.6092105617  0 0 0 | Xle Yle Zle   Chord   Ainc   [ Nspan Sspace ]
AFIL
"C:\eclipse\workspace\AircraftDesign\trunk\Airfoils\S1223_NEW_v3\S1223_NEW_v3.dat"
#-----------------------
SECTION
2.03257662072 23.85 8.00349065673   22.6092105617  0 0 0 | Xle Yle Zle   Chord   Ainc   [ Nspan Sspace ]
AFIL
"C:\eclipse\workspace\AircraftDesign\trunk\Airfoils\S1223_NEW_v3\S1223_NEW_v3.dat"
#-----------------------
SECTION
2.148191902 25.175 8.0716250543   22.1467494366  0 0 0 | Xle Yle Zle   Chord   Ainc   [ Nspan Sspace ]
AFIL
"C:\eclipse\workspace\AircraftDesign\trunk\Airfoils\S1223_NEW_v3\S1223_NEW_v3.dat"
CONTROL
Aileron  1.0  0.725  0. 0. 0.  -1.0 | Name  gain  Xhinge  XYZhvec  SgnDup
#-----------------------
SECTION
4.46049752763 51.675 9.43431300559   12.8975269341  0 0 0 | Xle Yle Zle   Chord   Ainc   [ Nspan Sspace ]
AFIL
"C:\eclipse\workspace\AircraftDesign\trunk\Airfoils\S1223_NEW_v3\S1223_NEW_v3.dat"
CONTROL
Aileron  1.0  0.725  0. 0. 0.  -1.0 | Name  gain  Xhinge  XYZhvec  SgnDup
#-----------------------
SECTION
4.57611280891 53.0 9.50244740316   12.435065809  0 0 0 | Xle Yle Zle   Chord   Ainc   [ Nspan Sspace ]
AFIL
"C:\eclipse\workspace\AircraftDesign\trunk\Airfoils\S1223_NEW_v3\S1223_NEW_v3.dat"
#==============================================================
#
SURFACE
Vertical Tail
10  1.0  20  -2.0  |  Nchord   Cspace   Nspan  Sspace

ANGLE
0.0

INDEX
3
#-----------------------
SECTION
42.102278574 0.0 7.00349065673   12.5  0 0 0 | Xle Yle Zle   Chord   Ainc   [ Nspan Sspace ]
AFIL
"C:\eclipse\workspace\AircraftDesign\trunk\Airfoils\NACA0012\NACA0012.dat"
CONTROL
Rudder  1.0  0.5  0. 0. 0.  -1.0 | Name  gain  Xhinge  XYZhvec  SgnDup
#-----------------------
SECTION
42.102278574 0.0 17.0034906567   12.5  0 0 0 | Xle Yle Zle   Chord   Ainc   [ Nspan Sspace ]
AFIL
"C:\eclipse\workspace\AircraftDesign\trunk\Airfoils\NACA0012\NACA0012.dat"
CONTROL
Rudder  1.0  0.5  0. 0. 0.  -1.0 | Name  gain  Xhinge  XYZhvec  SgnDup
#==============================================================
#
SURFACE
Vertical Tail 2
10  1.0  20  -2.0  |  Nchord   Cspace   Nspan  Sspace

YDUPLICATE
0.0

ANGLE
0.0

INDEX
4
#-----------------------
SECTION
42.102278574 23.4 5.00349065673   12.5  0 0 0 | Xle Yle Zle   Chord   Ainc   [ Nspan Sspace ]
AFIL
"C:\eclipse\workspace\AircraftDesign\trunk\Airfoils\NACA0012\NACA0012.dat"
CONTROL
Rudder  1.0  0.5  0. 0. 0.  -1.0 | Name  gain  Xhinge  XYZhvec  SgnDup
#-----------------------
SECTION
42.102278574 23.4 17.0034906567   12.5  0 0 0 | Xle Yle Zle   Chord   Ainc   [ Nspan Sspace ]
AFIL
"C:\eclipse\workspace\AircraftDesign\trunk\Airfoils\NACA0012\NACA0012.dat"
CONTROL
Rudder  1.0  0.5  0. 0. 0.  -1.0 | Name  gain  Xhinge  XYZhvec  SgnDup
